// SBML level 2 version 4
// dcterms:bibliographicCitation: urn:miriam:pubmed:8816754

// Same as MM-Modifier but does first order approximation by setting substrate variable in the rate law denominator to 0. This is done by using a dummy species variable.
function MM_Modifier__First_Order(v, substrate, enzyme)
  v*substrate*enzyme;
end
MM_Modifier__First_Order is "MM-Modifier (First Order)";

model MAPK_cascade()
  // MAPK cascade model from Huang and Ferrell (1996) Ultrasensitivity in the mitogen-activated protein kinase cascade. Proc. Natl. Acad. Sci. USA 93, 10078-83
  // This COPASI file simulates a time course and includes a network diagram that can be used to visualize the results (under Model/Biochemical/Diagrams).
  // This model was altered trivially from the original in Biomodels (BIOMD0000000009), by renaming the species "MAPKKK activator" to E1 and "MAPKKK inactivator" to E2, to conform with the notation of the original paper. The diagram was constructed with SBW's Network Layout tool.
  // This model originated from BioModels Database: A Database of Annotated Published Models. It is copyright (c) 2005-2008 The BioModels Team. For more information see the terms of use .
  // taxonomy:8355
  // biomodels.db:BIOMD0000000009
  // isHomologTo reactome:REACT_634
  // isVersionOf GO:0000165
  // isDescribedBy pubmed:8816754

  // Compartments:
  compartment compartment = 4e-12;

  // Species:
  species E1 in compartment = 3e-5;  // isVersionOf interpro:IPR003577
  species E2 in compartment = 0.0003;
  species KKK in compartment = 0.003; KKK is "Raf";  // isVersionOf uniprot:P12965
  species P_KKK in compartment = 0; P_KKK is "P-Raf";  // isVersionOf uniprot:P12965
  species KK in compartment = 1.2; KK is "Mek";  // isVersionOf uniprot:Q05116
  species P_KK in compartment = 0; P_KK is "P-Mek";  // isVersionOf uniprot:Q05116
  species PP_KK in compartment = 0; PP_KK is "PP-Mek";  // isVersionOf uniprot:Q05116
  species K in compartment = 1.2; K is "Erk";  // isVersionOf uniprot:P26696
  species P_K in compartment = 0; P_K is "P-Erk";  // isVersionOf uniprot:P26696
  species PP_K in compartment = 0; PP_K is "PP-Erk";  // isVersionOf uniprot:P26696

  // Parameters:
  var MAPKKK_phosphorylation_ratio;
  k_on_01 = 1000;
  k_off_01 = 150;
  v_01 = 150;
  k_on_02 = 1000;
  k_off_02 = 150;
  k_off_03 = 150;
  k_on_03 = 1000;
  k_off_04 = 150;
  k_on_04 = 1000;
  k_off_05 = 150;
  k_off_06 = 150;
  k_off_07 = 150;
  k_off_08 = 150;
  k_off_09 = 150;
  k_off_10 = 150;
  k_on_05 = 1000;
  k_on_06 = 1000;
  k_on_07 = 1000;
  k_on_08 = 1000;
  k_on_09 = 1000;
  k_on_10 = 1000;
  v_02 = 150;
  v_03 = 150;
  v_04 = 150;
  v_05 = 150;
  v_06 = 150;
  v_07 = 150;
  v_08 = 150;
  v_09 = 150;
  v_10 = 150;
  C_Erk_Pase = 0.12; C_Erk_Pase is "C_Erk-Pase";
  C_Mek_Pase = 0.0003; C_Mek_Pase is "C_Mek-Pase";
  C_E2 = 0.0003;
  sub0 = 0;

  // Assignment rules:
  Km_09 := (v_09 + k_off_09)/k_on_09;
  r_Erk_deactivation_P := C_Erk_Pase*v_08;
  Km_05 := (v_05 + k_off_05)/k_on_05;
  r_Mek_deactivation_P := C_Mek_Pase*v_04;
  r_Mek_deactivation_PP := C_Mek_Pase*v_06;
  Km_08 := (v_08 + k_off_08)/k_on_08;
  v_new_09 := v_09/Km_09;
  v_new_08 := r_Erk_deactivation_P/Km_08;
  Km_02 := (v_02 + k_off_02)/k_on_02;
  Km_06 := (v_06 + k_off_06)/k_on_06;
  v_new_06 := r_Mek_deactivation_PP/Km_06;
  Km_03 := (v_03 + k_off_03)/k_on_03;
  r_Erk_deactivation_PP := C_Erk_Pase*v_10;
  r_Raf_deactivation := C_E2*v_02;
  v_new_02 := r_Raf_deactivation/Km_02;
  Km_07 := (v_07 + k_off_07)/k_on_07;
  v_new_07 := v_07/Km_07;
  w_Mek_Erk := v_new_07/v_new_08;
  v_new_05 := v_05/Km_05;
  MAPKKK_phosphorylation_ratio := P_KKK/(P_KKK + KKK);
  v_new_03 := v_03/Km_03;
  Km_10 := (v_10 + k_off_10)/k_on_10;
  v_new_10 := r_Erk_deactivation_PP/Km_10;
  Km_04 := (v_04 + k_off_04)/k_on_04;
  v_new_04 := r_Mek_deactivation_P/Km_04;
  w_Raf_Mek := v_new_03/v_new_04;
  Km_01 := (v_01 + k_off_01)/k_on_01;
  v_new_01 := v_01/Km_01;
  w_E1_Raf := v_new_01/v_new_02;

  // Reactions:
  _01__Raf_activation: KKK => P_KKK; compartment*MM_Modifier__First_Order(v_new_01, KKK, E1); _01__Raf_activation is "(01) Raf activation";  // modifiers: E1
  _02__Raf_inactivation: P_KKK => KKK; compartment*v_new_02*P_KKK; _02__Raf_inactivation is "(02) Raf inactivation";
  _03__Mek_activation__P: KK => P_KK; compartment*MM_Modifier__First_Order(v_new_03, KK, P_KKK); _03__Mek_activation__P is "(03) Mek activation (P)";  // modifiers: P_KKK
  _04__Mek_deactivation__P: P_KK => KK; compartment*v_new_04*P_KK; _04__Mek_deactivation__P is "(04) Mek deactivation (P)";
  _05__Mek_activation__PP: P_KK => PP_KK; compartment*MM_Modifier__First_Order(v_new_05, P_KK, P_KKK); _05__Mek_activation__PP is "(05) Mek activation (PP)";  // modifiers: P_KKK
  _06__Mek_deactivation__PP: PP_KK => P_KK; compartment*v_new_06*PP_KK; _06__Mek_deactivation__PP is "(06) Mek deactivation (PP)";
  _07__Erk_activation__P: K => P_K; compartment*MM_Modifier__First_Order(v_new_07, K, PP_KK); _07__Erk_activation__P is "(07) Erk activation (P)";  // modifiers: PP_KK
  _08__Erk_deactivation__P: P_K => K; compartment*v_new_08*P_K; _08__Erk_deactivation__P is "(08) Erk deactivation (P)";
  _09__Erk_activation__PP: P_K => PP_K; compartment*MM_Modifier__First_Order(v_new_09, P_K, PP_KK); _09__Erk_activation__PP is "(09) Erk activation (PP)";  // modifiers: PP_KK
  _10__Erk_deactivation__PP: PP_K => P_K; compartment*v_new_10*PP_K; _10__Erk_deactivation__PP is "(10) Erk deactivation (PP)";

  // Unit definitions:
  unit substance = 1e-6 mole;
end
